<Lems>

    <!-- Specify which component to run -->
    <Target component="sim1"/>

    <!-- Include core NeuroML2 ComponentType definitions -->
    <Include file="Cells.xml"/>
    <Include file="Networks.xml"/>
    <Include file="Simulation.xml"/>

    <!-- Include a new definition of FN model in LEMS -->
    <include href="FN_Definitions.xml"/>

    <!-- Include cell & network definition -->
    <Include file="FitzHughNagumoNetwork.net.nml"/>

    <!--  Everything below here is just to run a simulation and display plots & save traces -->

    <Simulation id="sim1" length="400ms" step="0.01ms" target="net1">

        <Display id="d1" title="FN Cell Pop1"
                 timeScale="1ms" xmin="-40" xmax="440" ymin="-2.5" ymax="2.5">
            <Line id ="V" quantity="fnPop1[0]/V" scale="1" color="#000000" timeScale="1ms"/>
            <Line id ="W" quantity="fnPop1[0]/W" scale="1" color="#ff0000" timeScale="1ms"/>
        </Display>

        <Display id="d2" title="FN Cell Pop2"
                 timeScale="1ms" xmin="-40" xmax="440" ymin="-2.5" ymax="2.5">
            <Line id ="V" quantity="fnPop2[0]/V" scale="1" color="#000000" timeScale="1ms"/>
            <Line id ="W" quantity="fnPop2[0]/W" scale="1" color="#ff0000" timeScale="1ms"/>
        </Display>

        <Display id="d3" title="Synapse properties"
                 timeScale="1ms" xmin="-40" xmax="440" ymin="-2.5" ymax="2.5">
            <Line id ="G" quantity="fnPop2[0]/syn1/G" scale="1" color="#000000" timeScale="1ms"/>
        </Display>

        <OutputFile id="of1" fileName="./fnPop1.dat">
            <OutputColumn id="V" quantity="fnPop1[0]/V"/>
            <OutputColumn id="W" quantity="fnPop1[0]/W"/>
        </OutputFile>
        <OutputFile id="of2" fileName="./fnPop2.dat">
            <OutputColumn id="V" quantity="fnPop2[0]/V"/>
            <OutputColumn id="W" quantity="fnPop2[0]/W"/>
        </OutputFile>

    </Simulation>

</Lems>
